<?xml version="1.0"?>

<Node name="root" dt="0.01" gravity="0 -9.81 0">
    <RequiredPlugin name="SofaOpenglVisual"/>
    <RequiredPlugin pluginName="SofaPython"/>
    <RequiredPlugin name="SofaValidation" />

    <!-- Specify the visual style at the start of the scene -->
    <VisualStyle displayFlags="showVisual" />

    <!-- Default variables needed for collisions -->
    <DefaultPipeline depth="6" verbose="0" />
    <BruteForceDetection name="Detection" />
    <MinProximityIntersection name="Proximity" alarmDistance="0.5" contactDistance="0.05" />
    <DefaultContactManager name="Response" response="default" />

    <!-- Import the catheter -->
    <include href="catheter.scn" />

    <Node name = "Vessel">
        <EulerImplicitSolver name="ImplicitEulerSolver" rayleighMass="0.1" rayleighStiffness="0.1" />
        <CGLinearSolver name="CGLinearSolver" iterations="25" tolerance="1e-9" threshold="1e-9" />
        <SparseGridTopology fileTopology="mesh/vessel3.obj" n="20 6 6" />
        <MechanicalObject name="VesselState" />
        <UniformMass totalMass="0.05" />
        <HexahedronFEMForceField template="Vec3d" name="FEM" poissonRatio="0.45" youngModulus="10" />
        <FixedConstraint name="FixedConstraint" indices=" 0   3  26  29   30  34  57  61   62  66  87  91   95  96 111 119
                                                        120 123 140 143  146 147 159 165  168 171 180 183  186 189 198 201
                                                        202 206 217 221  222 225 234 237  238 241 250 253  254 258 269 273
                                                        274 277 286 289  292 295 304 307  310 316 328 329  332 335 352 355
                                                        356 364 379 380  384 388 409 413  414 418 441 445  449 450 467 475" />

        <Node name="CollisionModel">
            <MeshSTLLoader name="loader" filename="mesh/vessel3.stl" />
            <TriangleSetTopologyContainer  name="Container" src="@loader"/>
            <TriangleSetTopologyModifier   name="Modifier" />
            <TriangleSetTopologyAlgorithms name="TopoAlgo" template="Vec3d" />
            <TriangleSetGeometryAlgorithms name="GeomAlgo" template="Vec3d" />
            <MechanicalObject name="CollisionState" src="@loader" />
            <TriangleCollisionModel template="Vec3d" name="Triangles" contactStiffness="1"                      bothSide="1" />
            <LineCollisionModel     template="Vec3d" name="Lines"     contactStiffness="@[-1].contactStiffness" bothSide="1" />
            <PointCollisionModel    template="Vec3d" name="Points"    contactStiffness="@[-1].contactStiffness" bothSide="1" />
            <BarycentricMapping />

            <Node name="VisualModel">
                <OglModel name="Visual" material="Default Diffuse 1 0 0 1 0.3 Ambient 1 0 0 0.1 0.3" />
                <IdentityMapping  input="@.." output="@Visual" />
            </Node>
        </Node>
    </Node>
</Node>
