<?xml version="1.0" ?>

<Node name="root" dt="0.01" gravity="0 -9.81 0">
    <RequiredPlugin name="SofaOpenglVisual"/>
    <!-- Basic Components to perform the collision detection -->
    <VisualStyle displayFlags="showBehavior showCollisionModels" />
    <FreeMotionAnimationLoop name="FreeMotionAnimationLoop" />
    <DefaultPipeline name="CollisionPipeline" />
    <BruteForceDetection name="BruteForceDetection" />
    <LocalMinDistance name="Proximity" alarmDistance="0.2" contactDistance="0.09" angleCone="0.0" />
    <DefaultContactManager name="Response" response="FrictionContact" />
    <DefaultCollisionGroupManager />
    <LCPConstraintSolver maxIt="1000" tolerance="0.001"/>
    <!-- Using a rigid cube using collision triangles, lines and points  -->
    <Node name="Cube">
        <EulerImplicitSolver name="EulerImplicit"  rayleighStiffness="0.1" rayleighMass="0.1" />
        <CGLinearSolver name="CG Solver" iterations="25" tolerance="1e-5" threshold="1e-5"/>
        <MechanicalObject name="Cube RigidDOF" template="Rigid3d" dy="2" />
        <UniformMass name="UniformMass" totalMass="10.0" />
        <UncoupledConstraintCorrection />

        <Node name="Collision Model">
            <MeshTopology name="Cube Mesh" filename="mesh/cube.obj" />
            <MechanicalObject name="Collision Cube" />
            <!-- Collision Models -->
            <TriangleCollisionModel name="Cube Triangle For Collision" />
            <LineCollisionModel name="Cube Edge For Collision" />
            <PointCollisionModel name="Cube Point For Collision" />
            <RigidMapping name="RigidMapping Collision-RigidDOF" input="@../Cube RigidDOF" output="@Collision Cube" />
        </Node>
    </Node>
    <!-- Using a rigid cylinder using collision triangles, lines and points  -->
    <Node name="Cylinder">
        <EulerImplicitSolver name="EulerImplicit" />
        <CGLinearSolver name="CG Solver" iterations="25" tolerance="1e-5" threshold="1e-5"/>
        <MechanicalObject name="Cylinder RigidDOF" template="Rigid3d" dy="5" dx="1" />
        <UniformMass name="UniformMass" totalMass="10.0" />
        <UncoupledConstraintCorrection />

        <Node name="Collision Model">
            <MeshTopology name="Cylinder Mesh" filename="mesh/cylinder.obj" />
            <MechanicalObject name="Collision Cylinder" />
            <!-- Collision Models -->
            <TriangleCollisionModel name="Cylinder Triangle For Collision" />
            <LineCollisionModel name="Cylinder Edge For Collision" />
            <PointCollisionModel name="Cylinder Point For Collision" />
            <RigidMapping name="RigidMapping Collision-RigidDOF" input="@../Cylinder RigidDOF" output="@Collision Cylinder" />
        </Node>
    </Node>
    <Node name="Floor">
        <MeshTopology name="Topology Floor" filename="mesh/floor.obj" />
        <MechanicalObject name="Floor Particles" />
        <!-- Collision Models -->
        <TriangleCollisionModel name="Floor Triangle For Collision" moving="0" simulated="0" />
    </Node>
</Node>
